// COMSOL Multiphysics 6.2.0.290 model "Trial 1.mph"
// Outline of the model tree

Parameters
  c0 = 1000[mol/m^3]  // Initial concentration
  k_ads = 1e-6[m^3/(mol*s)]  // Forward rate constant
  k_des = 1e-9[1/s]  // Backward rate constant
  Gamma_s = 1000[mol/m^2]  // Active site concentration
  Ds = 1e-11[m^2/s]  // Surface diffusivity
  D = 1e-10[m^2/s]  // Gas diffusivity
  v_max = 1[mm/s]  // Maximum velocity
  delta = 0.1[mm]  // Channel width
  k = 0.1[s^-1]
  c_ref = 1[mol/m^3]

Geometry
  geom1 "Geometry 1" (2D, length unit mm)
    r1: Rectangle | pos = {0, -0.1}; size = {0.1, 0.3}
    pt1: Point | p = {0.1, 0.1}
    pt2: Point | p = {0.1, }
    fin: Finalize "Form Union"

Physics
  tds: DilutedSpecies "Transport of Diluted Species" on all domains
    dependent variable c
    SpeciesActivity.SpeciesActivity = Ideal
    TransportMechanism.Convection = 0
    cdm1: ConvectionDiffusionMigration "Transport Properties 1" (default) | u = {0, v_Iam, 0}; D_c = D
    nflx1: NoFlux (default)
    init1: init "Initial Values 1" (default) | initc = c0
    reac1: Reactions on domains 1 | R_c = k*c*(1-c/c_ref)
    conc1: Concentration on boundaries 1-6 | species = 1; c0 = 0.1

Mesh
  mesh1 "Mesh 1" (physics-controlled)
    size: MeshSizeDefault | hauto = 8

Studies
  std1 "Study 1"
    time: Transient "Time Dependent" | tlist = range(0,0.1,100)

Solver configurations
  sol1 "Solution 1" (study std1)
    v1: Variables "Dependent Variables 1"
    t1: Time "Time-Dependent Solver 1" | tlist = range(0,0.1,100); rtol = 0.005; maxorder = 2; stabcntrl = on
      fc1: FullyCoupled
        linsolver = d1
        maxiter = 8
        damp = 0.9
        jtech = once
        stabacc = aacc
        aaccdim = 5
        aaccmix = 0.9
        aaccdelay = 1
      d1: Direct "Direct, concentrations (tds)" | linsolver = pardiso; pivotperturb = 1.0E-13

Datasets
  dset1: Solution | solution = sol1

Plots
  pg1: PlotGroup2D "Concentration (tds)" | data = dset1
    surf1: Surface | expr = c
    str1: Streamline | expr = {tds.tflux_cx, tds.tflux_cy}; pointtype = arrow; arrowlength = logarithmic